**
**   Structure: 3-D cylindrical tube
**   Test objective: incompressible, viscous, laminar, 3D fluid flow.
**
*NODE, NSET=Nall
       1,-5.000000000000e-01,0.000000000000e+00,1.000000000000e+01
       2,-3.750000000000e-01,0.000000000000e+00,1.000000000000e+01
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*ELEMENT, TYPE=F3D8, ELSET=Eall
     1,     1,     2,     3,     4,     5,     6,     7,     8
     2,     4,     3,     9,    10,     8,     7,    11,    12
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*NSET,NSET=Nin
762,
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*NSET,NSET=Nwall
1,
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*MATERIAL,NAME=WATER
*DENSITY
1.
*FLUID CONSTANTS
4217.,1.E-2,293.
*SOLID SECTION,ELSET=Eall,MATERIAL=WATER
*INITIAL CONDITIONS,TYPE=FLUID VELOCITY
Nall,1,0.
Nall,2,0.
Nall,3,1.
*INITIAL CONDITIONS,TYPE=PRESSURE
Nall,1.
*NSET,NSET=Ninp
761,
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*NSET,NSET=Noutp
1,
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*NSET,NSET=Nout
2,
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*STEP,INCF=2
*STATIC
*BOUNDARY
Nwall,1,3,0.
Ninp,1,2,0.
Ninp,3,3,1.
Noutp,8,8,1.
*NODE PRINT,FREQUENCYF=2,NSET=NALL
V,PS
*END STEP
